New Capacitor.p1uc9 bus1=p1udt558 phases=3 Kv=12.47 conn=Wye Kvar=300.0

New CapControl.p1uc9 Capacitor=p1uc9 Element=Line.l(r:p1udt1829-p1udt558) Terminal=1 delay=100.0 Type=voltage Vmin=120.5 Vmax=125.0 Ptratio=59.99631547328862 Ctratio=100.0

New Capacitor.p1uc10 bus1=p1umv13 phases=3 Kv=12.47 conn=Wye Kvar=300.0

New CapControl.p1uc10 Capacitor=p1uc10 Element=Line.l(r:p1udt481-p1umv13) Terminal=1 delay=100.0 Type=voltage Vmin=120.5 Vmax=125.0 Ptratio=59.99631547328862 Ctratio=100.0
