New Capacitor.p1uc8 bus1=p1udt998 phases=3 Kv=12.47 conn=Wye Kvar=450.0

New CapControl.p1uc8 Capacitor=p1uc8 Element=Line.padswitch(r:p1udt957-p1udt998)p1u_10247 Terminal=1 delay=100.0 Type=voltage Vmin=120.5 Vmax=125.0 Ptratio=59.99631547328862 Ctratio=100.0
